# 16bit Timer resoliution
c/(432 MHz)*1/4 = 173.491 mm
CLK := 10 MHz
CLK2 := 8 MHz/1
DIV := 8
t_res := 1/(CLK/DIV) = 0.8 μs  # Reduce bits number
t_usb := 1/(CLK2/8) = 1 μs
t_usb*50000 = 50 ms
div := 16
t_max := 2^16*t_res = 52.4288 ms
t_usbMax := t_usb*2^16 = 65.536 ms
Value_max := 2^16/div = 4096
2^12 = 4096
c := 340*m/s
t_res2 := div*t_res = 12.8 μs
L_res := c*t_res = 0.272 mm
L_res2 := c*t_res2 = 4.352 mm
L_max := c*t_max = 17.8258 m
13.71 m/L_res2 = 3150.28
RF_transmit := 1 ms
# RF12 Baud rate calculation [kbs]
cs := 0
t_total := t_max + RF_transmit*8 = 60.4288 ms
1/(55 ms) = 18.1818 Hz
R := 2
Refresh := 1/t_total = 16.5484 Hz
# PW0268 calculations
Baud := 10000/29/(1 + R)/(1 + cs*7) = 114.943
C_clk := 10 pF  # 1 siunčiamą paketą sudaro 7bytes: [0xAA 0xAA 0xAA 0x4D 0xD2 MSB LSB]
R_clk := 3 kΩ
# Esant xx kbs perdavimui 56 bitus perduos per:
clk := 1/(2*π*R_clk*C_clk) = 5305.16 kHz
t_packet := 7*8/(Baud*10^3)*s = 0.4872 ms
1/(R_clk*C_clk)*0.7 = 23333.3 kHz
# RF02 Baud rate calculation [kbs]
R := 10
R_clk := 4.7 kΩ
C_clk := 4700 pF
Baud := 10000/29/(R + 1) = 31.348
# Musu 60kHz
fclk := 150 kHz
T_gaintsep := 220/fclk = 1.46667 ms
T_gaintsep*32 = 46.9333 ms
FirstGainTime := 3*T_gaintsep = 4.4 ms
